// SBML level 2 version 4

model ERK_pathway_final()

  // Compartments:
  compartment uVol = 1;

  // Species:
  species RAF in uVol = 81.94; RAF is "Mos";
  species RAF_P in uVol = 18.06; RAF_P is "Mos-P";
  species MEK in uVol = 272.22; MEK is "Mek1";
  species MEK_P in uVol = 19.93; MEK_P is "Mek1-P";
  species MEK_PP in uVol = 7.85; MEK_PP is "Mek1-PP";
  species ERK in uVol = 288.5; ERK is "Erk2";
  species ERK_P in uVol = 8.92; ERK_P is "Erk2-P";
  species ERK_PP in uVol = 2.93; ERK_PP is "Erk2-PP";
  species ras_gtp in uVol = 333; ras_gtp is "Ras-GTP";
  species total_mapk_activated in uVol; total_mapk_activated is "Total ERK activated";
  species total_mek in uVol; total_mek is "Total MEK activated";

  // Parameters:
  parameter_1 = 0.585; parameter_1 is "Raf activation by Ras catalytic constant";
  parameter_2 = 1.19e-6; parameter_2 is "Raf activation by Ras michaelis constant";
  parameter_3 = 10.8; parameter_3 is "Raf inactivation by ERK_pp, catalytic constant";
  parameter_4 = 3.45; parameter_4 is "Raf inactivation by ERK_pp, michaelis constant";
  kcat5 = 0.75; kcat5 is "MEK dephosphorylation, catalytic constant";
  km5 = 15; km5 is "MEK dephosphorylation, michaelis constant";
  kcat9 = 0.5; kcat9 is "ERK dephosphorylation, catalytic constant";
  km9 = 15; km9 is "ERK dephosphorylation, michaelis constant";
  kcat7 = 0.025; kcat7 is "ERK phosphorylation, catalytic constant";
  km7 = 15; km7 is "ERK phosphorylation, michaelis constant";
  kcat3 = 0.025; kcat3 is "MEK phosphorylation, catalytic constant";
  km3 = 15; km3 is "MEK phosphorylation, michaelis constant";

  // Assignment rules:
  total_mapk_activated := ERK_P + ERK_PP;
  total_mek := MEK_P + MEK_PP;

  // Reactions:
  J1: RAF_P => RAF; RAF_P*V2*uVol*(1/(KK2 + RAF_P)); J1 is "RAF inactivation";
    V2 = 0.25; KK2 = 8;
  J2: MEK => MEK_P; MEK*RAF_P*kcat3*uVol*(1/(km3 + MEK)); J2 is "phosphorylation of MEK";  // modifiers: RAF_P
  J3: MEK_P => MEK_PP; RAF_P*MEK_P*kcat3*uVol*(1/(MEK_P + km3)); J3 is "phosphorylation of MEK-P";  // modifiers: RAF_P
  J4: MEK_PP => MEK_P; MEK_PP*kcat5*uVol*(1/(MEK_PP + km5)); J4 is "dephosphorylation of MEK-PP";
  J5: MEK_P => MEK; MEK_P*kcat5*uVol*(1/(MEK_P + km5)); J5 is "dephosphorylation of MEK-P";
  J6: ERK => ERK_P; ERK*MEK_PP*kcat7*uVol*(1/(km7 + ERK)); J6 is "phosphorylation of ERK";  // modifiers: MEK_PP
  J7: ERK_P => ERK_PP; ERK_P*MEK_PP*kcat7*uVol*(1/(km7 + ERK_P)); J7 is "phosphorylation of ERK-P";  // modifiers: MEK_PP
  J8: ERK_PP => ERK_P; ERK_PP*kcat9*uVol*(1/(km9 + ERK_PP)); J8 is "dephosphorylation of ERK-PP";
  J9: ERK_P => ERK; ERK_P*kcat9*uVol*(1/(km9 + ERK_P)); J9 is "dephosphorylation of ERK-P";
  Raf_activation_by_Ras: RAF => RAF_P; RAF*parameter_1*ras_gtp*(1/(RAF + parameter_2));  // modifiers: ras_gtp
  Negative_feedback: RAF_P => RAF; ERK_PP*RAF_P*parameter_3*(1/(RAF_P + parameter_4));  // modifiers: ERK_PP

  // Unit definitions:
  unit substance = 1e-9 mole; substance is "nanomole";
end
