// SBML level 2 version 4

model ERK_pathway_without_feedback()

  // Compartments:
  compartment uVol = 1;

  // Species:
  species RAF in uVol = 81.94; RAF is "Mos";
  species RAF_P in uVol = 18.06; RAF_P is "Mos-P";
  species MEK in uVol = 272.22; MEK is "Mek1";
  species MEK_PP in uVol = 7.85; MEK_PP is "Mek1-PP";
  species ERK in uVol = 288.5; ERK is "Erk2";
  species ERK_PP in uVol = 2.93; ERK_PP is "Erk2-PP";
  species ras_gtp in uVol = 333; ras_gtp is "Ras-GTP";

  // Reactions:
  J1: RAF_P => RAF; J1_V*RAF_P/(J1_Km + RAF_P); J1 is "RAF_P inactivation";
    J1_V = 0.25; J1_Km = 8;
  Raf_activation_by_Ras: RAF => RAF_P; Raf_activation_by_Ras_kcat*ras_gtp*RAF/(Raf_activation_by_Ras_Km + RAF);  // modifiers: ras_gtp
    Raf_activation_by_Ras_kcat = 0.25; Raf_activation_by_Ras_Km = 8;
  J2: MEK => MEK_PP; J2_kcat*RAF_P*MEK/(J2_Km + MEK); J2 is "MEK -> MEK_PP";  // modifiers: RAF_P
    J2_kcat = 0.25; J2_Km = 8;
  J4: MEK_PP => MEK; J4_V*MEK_PP/(J4_Km + MEK_PP); J4 is "MEK_PP -> MEK";
    J4_V = 0.25; J4_Km = 8;
  J6: ERK => ERK_PP; J6_kcat*MEK_PP*ERK/(J6_Km + ERK); J6 is "ERK -> ERKPP";  // modifiers: MEK_PP
    J6_kcat = 0.25; J6_Km = 8;
  J8: ERK_PP => ERK; J8_V*ERK_PP/(J8_Km + ERK_PP); J8 is "ERK_PP -> ERK";
    J8_V = 0.25; J8_Km = 8;

  // Unit definitions:
  unit substance = 1e-9 mole; substance is "nanomole";
end
